Q(T) :=
    if T < 100 K
        900 J/(kg*K)
    else if T < 115 K
        1470*J/(kg*K)
    else if T < 200 K
        (1470 - 470*(T - 115*K)/(85*K))*J/(kg*K)
    else if T < 400 K
        (1000 + 100*(T - 200*K)/(200*K))*J/(kg*K)
    else
        1100*J/(kg*K)  # error: This is a premium feature. To use this and other premium features, please upgrade to a full license using the 'Upgrade' button.
Q_1(T) := 1000*J/(kg*K)
q(T) := (1470 - 470*(T - 115)/85) → 35800/17 - 94*T/17
q_1(T) := (1000 + 100*(T - 200)/200)
t(T) := (2300*(1 - 1/50*(T - 115)/85)) → 40158/17 - 46*T/85
t_1(T) := 2300*(98/100 - 3/100*(T - 200)/200)
2300*(0.98 - 0.03*(T - 200*K)/(200*K))
f(T) := integral(q(T)*t(T), T = 115 .. T) → 46*(T - 115)*(94*T^2 - 658355*T + 393090175)/4335
f_1(T) := integral(q_1(T)*t_1(T), T = 200 .. T) → 23*(T - 200)*(7200*T - T^2 + 37800000)/400
g(T) := f(T)^-1 → 4335/((46*T - 5290)*(94*T^2 - 658355*T + 393090175))
q_2(T) := 1100
t_2(T) := 2300*(95/100 - 7/100*(T - 400)/800)
ρ(T) :=
    if T < 115 K
        2300 kg/m^3
    else if T < 200 K
        2300*(1 - 0.02*(T - 115 K)/(85 K))*kg/m^3
    else if T < 400 K
        2300*(0.98 - 0.03*(T - 200 K)/(200 K))*kg/m^3
    else
        2300*(0.95 - 0.07*(T - 400 K)/(800 K))*kg/m^3
ρ_1(T) := 2300*kg/m^3
f_2(T) := integral(q_2(T)*t_2(T), T = 400 .. T) → -253*(T - 400)*(7*T - 154800)/16
f_2(514) = 272560505
114*1100*2200 = 275880000
# value  923350489.19699645  double
7*1200 - 154800 = -146400
f(y) := y == f(T)
114*1100*2200 + 8.89*10^8 = 1164880000
400*100*2200 = 88000000
(100*900 + 15*1470 + 85*1235 + 200*1050)*0.97*2300 = 952692775
f(T) := Q(T)*ρ(T)*1 m^3
R(T) := integral(f(T), T = 0 .. T)
R_1(T) := integral(Q_1(T)*ρ_1(T)*m^3, T = 0 .. T)
R(115 K) =  # error: This variable is undefined. Check that the label is set correctly.
R(300 K) =  # error
R(200 K) + f_1(339.75)*J =  # error
R(351.1 K) =  # error
λ(T) := 1.36 - 0.136*(T/(100 K)) + 0.0057*(T/(100 K))^2
R(400 K) =  # error
T := 0 K, 1 K .. 1200 K
v := 923350489.197 J
u := 10000 J
R(200 K) =  # error
u(T) := R(T) - v
u(351.1 K) =  # error
v = 923350489 kg*m^2/s^2
root(u(s), s, 0*K, 1199*K) =  # error
# [plot: R(T) (J), R_1(T) (J) vs T (K)]
R(400 K) =  # error
# [plot: λ(T) vs T (K)]
